<?xml version="1.0"?>
<!--
   *************************************************************************
   This file is part of ogeL.

    ogeL is free software; you can redistribute it and/or modify
    it under the terms of the GNU General Public License as published by
    the Free Software Foundation; either version 2 of the License, or
    (at your option) any later version.

    ogeL is distributed in the hope that it will be useful,
    but WITHOUT ANY WARRANTY; without even the implied warranty of
    MERCHANTABILITY or FITNESS FOR A PARTICULAR PURPOSE.  See the
    GNU General Public License for more details.

    You should have received a copy of the GNU General Public License
    along with ogeL; if not, write to the Free Software
    Foundation, Inc., 51 Franklin St, Fifth Floor, Boston, MA  02110-1301  USA
   *************************************************************************

  For more information see ogel-set.xml
  http://www.t3r.de/fg/ogel/

  $Revision$
-->
<?xml-stylesheet type="text/xsl" href="http://jsbsim.sourceforge.net/JSBSim.xsl"?>
<fdm_config name="ogel" version="2.0" release="PRODUCTION"
   xmlns:xsi="http://www.w3.org/2001/XMLSchema-instance"
   xsi:noNamespaceSchemaLocation="http://jsbsim.sourceforge.net/JSBSim.xsd">

 <fileheader>
  <author> Aeromatic v 0.9 </author>
  <filecreationdate>06-01-31 10:00</filecreationdate>
  <version> 1.0 </version>
  <description> Models a ogel experimental aircraft</description>
 </fileheader>

<!--
  File:     ogel.xml
  Inputs:
    name:          ogel
    type:          light single
    max weight:    1200 lb
    wing span:     32.19 ft
    length:        24.6 ft
    wing area:     unspecified
    gear type:     taildragger
    retractable?:  no
    # engines:     1
    engine type:   piston
    engine layout: forward fuselage
    yaw damper?    no

  Outputs:
    wing loading:  14.00 lb/sq-ft
    CL-alpha:      5 per radian
    CL-0:          0.25
    CL-max:        1.4
    CD-0:          0.028
    K:             0.04

-->

 <metrics>
     <wingarea unit="M2"> 1.52 </wingarea>
     <wingspan unit="M"> 3.5 </wingspan>
     <chord unit="M"> 0.233 </chord>
     <htailarea unit="M2"> 0.2 </htailarea>
     <htailarm unit="M"> 0.8 </htailarm><!-- estimate: 6.3 m real a/c 6.3/4 = 1.58 m -->
     <location name="AERORP" unit="M">
         <x> 0.775 </x><!-- fwd CG as basis for CFD data JTP 2020 -->
         <y> 0 </y>
         <z> 0.3 </z>
     </location>
   <location name="EYEPOINT" unit="M">
     <x>  0 </x>
     <y> 0 </y>
     <z>  0 </z>
   </location>
   <location name="VRP" unit="M">
     <x>0</x>
     <y>0</y>
     <z>1.56</z>
   </location>
 </metrics>

 <mass_balance>
     <ixx unit="KG*M2"> 1.995 </ixx><!-- surface model only -shell structure -->
     <iyy unit="KG*M2"> 1.132 </iyy>
     <izz unit="KG*M2"> 2.847 </izz>
     <ixy unit="KG*M2"> 0 </ixy>
     <ixz unit="KG*M2"> -0.126 </ixz>
     <iyz unit="KG*M2"> 0 </iyz>
     <emptywt unit="KG"> 5.4 </emptywt> <!-- surface model only -shell structure -->
     <location name="CG" unit="M">
         <x> 0.954 </x><!-- surface model only as given by Mr. Potulov malil from 03.06. -->
         <y> 0 </y>
         <z> 0.02 </z>
     </location>

         <pointmass name="Engine motor">
         <weight unit="KG"> 1.06 </weight>
         <location name="POINTMASS" unit="M">
             <x> 1.6 </x>
             <y> 0 </y>
             <z> 0.3 </z>
         </location>
     </pointmass>

     <pointmass name="Battery">
         <weight unit="KG"> 1.32 </weight>
         <location name="POINTMASS" unit="M">
             <x> 0.3 </x>
             <y> 0 </y>
             <z> 0.03 </z>
         </location>
     </pointmass>

     <pointmass name="Nose LDG">
         <weight unit="KG"> 0.12 </weight>
         <location name="POINTMASS" unit="M">
             <x> 0.5 </x>
             <y> 0 </y>
             <z> 0.2 </z>
         </location>
     </pointmass>

     <pointmass name="Main LDG left">
         <weight unit="KG"> 0.24 </weight>
         <location name="POINTMASS" unit="M">
             <x> 1.1 </x>
             <y> -0.4 </y>
             <z> 0.15 </z>
         </location>
     </pointmass>

     <pointmass name="Main LDG right">
         <weight unit="KG"> 0.24 </weight>
         <location name="POINTMASS" unit="M">
             <x> 1.1 </x>
             <y> 0.4 </y>
             <z> 0.15 </z>
         </location>
     </pointmass>

     <pointmass name="Payload">
         <weight unit="KG"> 3.5 </weight> <!-- estimated by WS to achive about 12 kg at CG 0.775  -->
         <location name="POINTMASS" unit="M">
             <x> 0.4 </x>
             <y> 0 </y>
             <z> 0.1 </z>
         </location>
     </pointmass>

 </mass_balance>

 <ground_reactions>

  <contact type="BOGEY" name="LEFT_MAIN">
   <location unit="M">
     <x> 2 </x>
     <y> -1 </y>
     <z> -1.00 </z>
   </location>
   <static_friction>  0.80 </static_friction>
   <dynamic_friction> 0.50 </dynamic_friction>
   <rolling_friction> 0.02 </rolling_friction>
   <spring_coeff unit="LBS/FT">       100.00 </spring_coeff>
   <damping_coeff unit="LBS/FT/SEC">   20 </damping_coeff>
   <max_steer unit="DEG">0</max_steer>
   <brake_group>LEFT</brake_group>
   <retractable>0</retractable>
 </contact>

  <contact type="BOGEY" name="RIGHT_MAIN">
   <location unit="M">
     <x> 2 </x>
     <y>  1 </y>
     <z> -1.00 </z>
   </location>
   <static_friction>  0.80 </static_friction>
   <dynamic_friction> 0.50 </dynamic_friction>
   <rolling_friction> 0.02 </rolling_friction>
   <spring_coeff unit="LBS/FT">       100.00 </spring_coeff>
   <damping_coeff unit="LBS/FT/SEC">   20 </damping_coeff>
   <max_steer unit="DEG">0</max_steer>
   <brake_group>RIGHT</brake_group>
   <retractable>0</retractable>
 </contact>

  <contact type="BOGEY" name="TAIL">
   <location unit="M">
     <x> 0.2 </x>
     <y>   0.00 </y>
     <z> -1.00 </z>
   </location>
   <static_friction>  0.80 </static_friction>
   <dynamic_friction> 0.50 </dynamic_friction>
   <rolling_friction> 0.02 </rolling_friction>
   <spring_coeff unit="LBS/FT">       100.00 </spring_coeff>
   <damping_coeff unit="LBS/FT/SEC">   20 </damping_coeff>
   <max_steer unit="DEG"> 0.00 </max_steer>
   <brake_group>NONE</brake_group>
   <retractable>0</retractable>
 </contact>


 </ground_reactions>

 <propulsion>

   <engine file="200hp-jsbsim-2.0">
    <location unit="IN">
      <x>  36.00 </x>
      <y>   0.00 </y>
      <z>   0.00 </z>
    </location>
    <orient unit="DEG">
      <pitch> 0.00 </pitch>
      <roll>   0.00 </roll>
      <yaw>   0.00 </yaw>
    </orient>
    <feed>0</feed>
    <thruster file="8ftfixed-jsbsim-2.0">
     <location unit="IN">
       <x>  36.00 </x>
       <y>   0.00 </y>
       <z>   0.00 </z>
     </location>
     <orient unit="DEG">
       <pitch> 0.00 </pitch>
       <roll>   0.00 </roll>
       <yaw>   0.00 </yaw>
     </orient>
    </thruster>
  </engine>

  <tank type="FUEL" number="0">
     <location unit="IN">
       <x> 141.70 </x>
       <y>   0.00 </y>
       <z>  -7.38 </z>
     </location>
     <capacity unit="LBS"> 100.00 </capacity>
     <contents unit="LBS">  0.00 </contents>
  </tank>

  <tank type="FUEL" number="1">
     <location unit="IN">
       <x> 141.70 </x>
       <y>   0.00 </y>
       <z>  -7.38 </z>
     </location>
     <capacity unit="LBS"> 100.00 </capacity>
     <contents unit="LBS">  0.00 </contents>
  </tank>

 </propulsion>

 <flight_control name="FCS: ogel">

  <channel name="Pitch">
   <summer name="Pitch Trim Sum">
      <input>fcs/elevator-cmd-norm</input>
      <input>fcs/pitch-trim-cmd-norm</input>
      <clipto>
        <min> -1 </min>
        <max>  1 </max>
      </clipto>
   </summer>

   <aerosurface_scale name="Elevator Control">
      <input>fcs/pitch-trim-sum</input>
      <range>
        <min> -0.35 </min>
        <max>  0.35</max>
      </range>
      <output>fcs/elevator-pos-rad</output>
   </aerosurface_scale>

  </channel>

  <channel name="Roll">
   <summer name="Roll Trim Sum">
      <input>fcs/aileron-cmd-norm</input>
      <input>fcs/roll-trim-cmd-norm</input>
      <clipto>
        <min> -1 </min>
        <max>  1 </max>
      </clipto>
   </summer>

   <aerosurface_scale name="Left Aileron Control">
      <input>fcs/roll-trim-sum</input>
      <range>
        <min> -0.35 </min>
        <max>  0.35 </max>
      </range>
      <output>fcs/left-aileron-pos-rad</output>
   </aerosurface_scale>

   <aerosurface_scale name="Right Aileron Control">
      <input>fcs/roll-trim-sum</input>
      <range>
        <min> -0.35 </min>
        <max>  0.35 </max>
      </range>
      <output>fcs/right-aileron-pos-rad</output>
   </aerosurface_scale>

  </channel>

  <channel name="Yaw">
   <summer name="Rudder Command Sum">
      <input>fcs/rudder-cmd-norm</input>
      <input>fcs/yaw-trim-cmd-norm</input>
      <limit>
        <min> -0.35 </min>
        <max>  0.35 </max>
      </limit>
   </summer>

   <aerosurface_scale name="Rudder Control">
      <input>fcs/rudder-command-sum</input>
      <range>
        <min> -0.35 </min>
        <max>  0.35 </max>
      </range>
      <output>fcs/rudder-pos-rad</output>
   </aerosurface_scale>

  </channel>

  <channel name="Flaps">
   <kinematic name="Flaps Control">
     <input>fcs/flap-cmd-norm</input>
     <traverse>
       <setting>
          <position>  0 </position>
          <time>      0 </time>
       </setting>
       <setting>
          <position> 15 </position>
          <time>      4 </time>
       </setting>
       <setting>
          <position> 30 </position>
          <time>      3 </time>
       </setting>
     </traverse>
     <output>fcs/flap-pos-deg</output>
   </kinematic>

  </channel>

  <channel name="Landing Gear">
  </channel>

  <channel name="Speedbrake">
   <kinematic name="Speedbrake Control">
     <input>fcs/speedbrake-cmd-norm</input>
     <traverse>
       <setting>
          <position> 0 </position>
          <time>     0 </time>
       </setting>
       <setting>
          <position> 1 </position>
          <time>     1 </time>
       </setting>
     </traverse>
     <output>fcs/speedbrake-pos-norm</output>
   </kinematic>

  </channel>

 </flight_control>

 <aerodynamics>


  <axis name="LIFT">

<!-- Trogon start -->
            <function name="aero/coefficient/CLwbh">
                <description>Lift_due_to_alpha</description>
                <product>
                    <property>aero/qbar-psf</property>
                    <property>metrics/Sw-sqft</property>
                      <table>
                          <independentVar>aero/alpha-rad</independentVar>
                          <tableData>
                              -0.105       -0.227
                              -0.087       -0.124
                              -0.07        -0.061
                              -0.052       -0.005
                              -0.035        0.06
                              -0.017        0.114
                               0            0.191
                               0.0175       0.264
                               0.035        0.331
                               0.052        0.400
                               0.070        0.473
                               0.087        0.538
                               0.105        0.606
                               0.122        0.666
                               0.140        0.727
                               0.157        0.772
                               0.175        0.807
                          </tableData>
                      </table>
                </product>
            </function>

            <function name="aero/coefficient/CLadot">
                <description>Lift_due_to_alpha_rate</description>
                <product>
                    <property>aero/qbar-psf</property>
                    <property>metrics/Sw-sqft</property>
                    <property>aero/alphadot-rad_sec</property>
                    <property>aero/ci2vel</property>
                    <value>1.0</value>
                </product>
            </function>

            <function name="aero/coefficient/CLq">
                <description>Lift_due_to_pitch_rate</description>
                <product>
                    <property>aero/qbar-psf</property>
                    <property>metrics/Sw-sqft</property>
                    <property>velocities/q-aero-rad_sec</property>
                    <property>aero/ci2vel</property>
                    <value>4.662</value>
                </product>
            </function>

<!-- Trogon end -->

    <function name="aero/coefficient/dCLflap">
       <description>Delta_Lift_due_to_flaps</description>
       <product>
           <property>aero/qbar-psf</property>
           <property>metrics/Sw-sqft</property>
           <property>fcs/flap-pos-deg</property>
           <value> 0.01333 </value>
       </product>
    </function>

    <function name="aero/coefficient/dCLsb">
       <description>Delta_Lift_due_to_speedbrake</description>
       <product>
           <property>aero/qbar-psf</property>
           <property>metrics/Sw-sqft</property>
           <property>fcs/speedbrake-pos-norm</property>
           <value>0</value>
       </product>
    </function>

    <function name="aero/coefficient/CLde">
       <description>Lift_due_to_Stabilator_Deflection</description>
       <product>
           <property>aero/qbar-psf</property>
           <property>metrics/Sh-sqft</property>
           <property>fcs/elevator-pos-rad</property>
           <value>4.9</value>
       </product>
    </function>

  </axis>

  <axis name="DRAG">

<!-- Trogon start -->
     <function name="aero/coefficient/CDwbh">
         <description>Drag_due_to_alpha</description>
         <product>
             <value> 1.0 </value><!-- for trouble shooting purposes only -->
             <property>aero/qbar-psf</property>
             <property>metrics/Sw-sqft</property>

               <table>
                   <independentVar>aero/alpha-rad</independentVar>
                   <tableData>
                       -0.105        0.055
                       -0.087        0.043
                       -0.07         0.035
                       -0.052        0.030
                       -0.035        0.027
                       -0.0175       0.026
                        0            0.025
                        0.0175       0.026
                        0.035        0.028
                        0.052        0.030
                        0.070        0.033
                        0.087        0.037
                        0.105        0.042
                        0.122        0.047
                        0.140        0.054
                        0.157        0.060
                        0.175        0.068
                   </tableData>
               </table>
         </product>
     </function>
<!-- Trogon end -->


    <function name="aero/coefficient/CDflap">
       <description>Drag_due_to_flaps</description>
         <product>
           <property>aero/qbar-psf</property>
           <property>metrics/Sw-sqft</property>
           <property>fcs/flap-pos-deg</property>
           <value> 0.00100 </value>
         </product>
    </function>

    <function name="aero/coefficient/CDsb">
       <description>Drag_due_to_speedbrakes</description>
         <product>
           <property>aero/qbar-psf</property>
           <property>metrics/Sw-sqft</property>
           <property>fcs/speedbrake-pos-norm</property>
           <value>0.028</value>
         </product>
    </function>

    <function name="aero/coefficient/CDbeta">
       <description>Drag_due_to_sideslip</description>
       <product>
          <property>aero/qbar-psf</property>
          <property>metrics/Sw-sqft</property>
          <table>
            <independentVar lookup="row">aero/beta-rad</independentVar>
            <tableData>
              -1.57       1.230
              -0.26       0.050
               0.00       0.000
               0.26       0.050
               1.57       1.230
            </tableData>
          </table>
       </product>
    </function>

    <function name="aero/coefficient/CDde">
       <description>Drag_due_to_Elevator_Deflection</description>
       <product>
           <property>aero/qbar-psf</property>
           <property>metrics/Sw-sqft</property>
           <abs><property>fcs/elevator-pos-norm</property></abs>
           <value>0.04</value>
       </product>
    </function>

  </axis>

  <axis name="SIDE">

    <function name="aero/coefficient/CYb">
       <description>Side_force_due_to_beta</description>
       <product>
           <property>aero/qbar-psf</property>
           <property>metrics/Sw-sqft</property>
           <property>aero/beta-rad</property>
           <value>-1</value>
       </product>
    </function>

  </axis>

  <axis name="ROLL">

    <function name="aero/coefficient/Clb">
       <description>Roll_moment_due_to_beta</description>
       <product>
           <property>aero/qbar-psf</property>
           <property>metrics/Sw-sqft</property>
           <property>metrics/bw-ft</property>
           <property>aero/beta-rad</property>
           <value>-0.1</value>
       </product>
    </function>

    <function name="aero/coefficient/Clp">
       <description>Roll_moment_due_to_roll_rate</description>
       <product>
           <property>aero/qbar-psf</property>
           <property>metrics/Sw-sqft</property>
           <property>metrics/bw-ft</property>
           <property>aero/bi2vel</property>
           <property>velocities/p-aero-rad_sec</property>
           <value>-0.4</value>
       </product>
    </function>

    <function name="aero/coefficient/Clr">
       <description>Roll_moment_due_to_yaw_rate</description>
       <product>
           <property>aero/qbar-psf</property>
           <property>metrics/Sw-sqft</property>
           <property>metrics/bw-ft</property>
           <property>aero/bi2vel</property>
           <property>velocities/r-aero-rad_sec</property>
           <value>0.15</value>
       </product>
    </function>

    <function name="aero/coefficient/Clda">
       <description>Roll_moment_due_to_aileron</description>
       <product>
          <property>aero/qbar-psf</property>
          <property>metrics/Sw-sqft</property>
          <property>metrics/bw-ft</property>
          <property>fcs/left-aileron-pos-rad</property>
          <table>
            <independentVar lookup="row">velocities/mach</independentVar>
            <tableData>
              0.0    0.170
              2.0    0.057
            </tableData>
          </table>
       </product>
    </function>

    <function name="aero/coefficient/Cldr">
       <description>Roll_moment_due_to_rudder</description>
       <product>
           <property>aero/qbar-psf</property>
           <property>metrics/Sw-sqft</property>
           <property>metrics/bw-ft</property>
           <property>fcs/rudder-pos-rad</property>
           <value>0.01</value>
       </product>
    </function>

  </axis>

  <axis name="PITCH">

<!-- Trogon start -->
    <function name="aero/coefficient/Cmwbh">
        <description>Pitching_moment_due_to_alpha</description>
            <product>
                <value> 1.0 </value><!-- for trouble shooting purposes only -->
                <property>aero/qbar-psf</property>
                <property>metrics/Sw-sqft</property>
                <property>metrics/cbarw-ft</property>
                <sum>
                    <value> 0 </value> <!-- -0.0051 a correction value to get exact equilibrium -->
                    <table>
                        <independentVar>aero/alpha-rad</independentVar>
                        <tableData>
                            0.0000	0.033
                            0.0175	0.018
                            0.0349	0.010
                            0.0524	-0.003
                            0.0698	-0.017
                            0.0873	-0.037
                            0.1047	-0.046
                            0.1222	-0.062
                            0.1396	-0.074
                            0.1571	-0.080
                            0.1745	-0.085
                        </tableData>
                    </table>
                </sum>
            </product>
    </function>

            <function name="aero/coefficient/Cmadot">
                <description>Pitch_moment_due_to_alpha_rate</description>
                <product>
                    <value> 1.0 </value><!-- for trouble shooting purposes only -->
                    <property>aero/qbar-psf</property>
                    <property>metrics/Sw-sqft</property>
                    <property>metrics/cbarw-ft</property>
                    <property>aero/ci2vel</property>
                    <property>aero/alphadot-rad_sec</property>
                    <value>-6.7918</value>
                </product>
            </function>

            <function name="aero/coefficient/Cmq">
                <description>Pitch_moment_due_to_pitch_rate</description>
                <product>
                    <value> 1.0 </value><!-- for trouble shooting purposes only -->
                    <property>aero/qbar-psf</property>
                    <property>metrics/Sw-sqft</property>
                    <property>metrics/cbarw-ft</property>
                    <property>aero/ci2vel</property>
                    <property>velocities/q-aero-rad_sec</property>
                    <value>-16.0079</value>
                </product>
            </function>
<!-- Trogon end -->

    <function name="aero/coefficient/Cmde">
       <description>Pitch_moment_due_to_elevator</description>
       <product>
          <property>aero/qbar-psf</property>
          <property>metrics/Sh-sqft</property>
          <property>metrics/lh-ft</property>
          <property>fcs/elevator-pos-rad</property>
          <value>-4.9</value>
       </product>
    </function>

  </axis>

  <axis name="YAW">

    <function name="aero/coefficient/Cnb">
       <description>Yaw_moment_due_to_beta</description>
       <product>
           <property>aero/qbar-psf</property>
           <property>metrics/Sw-sqft</property>
           <property>metrics/bw-ft</property>
           <property>aero/beta-rad</property>
           <value>0.12</value>
       </product>
    </function>

    <function name="aero/coefficient/Cnr">
       <description>Yaw_moment_due_to_yaw_rate</description>
       <product>
           <property>aero/qbar-psf</property>
           <property>metrics/Sw-sqft</property>
           <property>metrics/bw-ft</property>
           <property>aero/bi2vel</property>
           <property>velocities/r-aero-rad_sec</property>
           <value>-0.15</value>
       </product>
    </function>

    <function name="aero/coefficient/Cndr">
       <description>Yaw_moment_due_to_rudder</description>
       <product>
           <property>aero/qbar-psf</property>
           <property>metrics/Sw-sqft</property>
           <property>metrics/bw-ft</property>
           <property>fcs/rudder-pos-rad</property>
           <value>-0.1</value>
       </product>
    </function>

    <function name="aero/coefficient/Cnda">
       <description>Adverse_yaw</description>
       <product>
           <property>aero/qbar-psf</property>
           <property>metrics/Sw-sqft</property>
           <property>metrics/bw-ft</property>
           <property>fcs/left-aileron-pos-rad</property>
           <value>-0.01</value>
       </product>
    </function>

  </axis>

 </aerodynamics>

    <external_reactions>
        <force name="thrust-lbs" frame="BODY">
            <location unit="M">
                <x> 1.58 </x>
                <y> 0 </y>
                <z> 0.3 </z>
            </location>
            <direction>
                <x> 1 </x>
                <y> 0 </y>
                <z> 0 </z>
            </direction>
        </force>
    </external_reactions>

    <property value="0.0"> external_reactions/thrust-lbs/magnitude </property>


<output name="localhost" type="SOCKET" port="5138" protocol="UDP" rate="2">

<property>position/lat-gc-deg</property>
<property>position/long-gc-deg</property>
<property> position/h-sl-meters </property>
<property> velocities/ve-kts </property>
<property> attitude/roll-rad </property>
<property> attitude/pitch-rad </property>
<property> attitude/heading-true-rad </property>

<property> fcs/left-aileron-pos-deg </property>
<property> fcs/right-aileron-pos-deg </property>
<property> fcs/elevator-pos-deg </property>
<property> fcs/rudder-pos-deg </property>
<property> fcs/rudder-cmd-norm </property>
<property> aero/alpha-deg </property>


 </output>


</fdm_config>
